// COMSOL Multiphysics 6.0.0.354 model "li_battery_single_particle.mph"
// Outline of the model tree

Parameters
  a = 1  // Multiplicative factor for the parametric study
  i_1C = 17.5[A/m^2]  // 1C discharge current
  Acell = 24e-4[m^2]  // Cell cross section area
  Iapplied = -i_1C*a*Acell  // Applied current
  Lneg = 100e-6[m]  // Length of negative electrode
  Lpos = 174e-6[m]  // Length of positive electrode
  Lsep = 52e-6[m]  // Separator thickness
  epspos = Lpos/(Lneg+Lpos+Lsep)  // Positive electrode fractional volume in battery
  epsneg = Lneg/(Lneg+Lpos+Lsep)  // Negative electrode fractional volume in battery
  epssep = Lsep/(Lneg+Lpos+Lsep)  // Separator fractional volume in battery
  Vcell = (Lneg+Lpos+Lsep)*Acell  // Cell volume
  opsocpos0 = 0  // Positive electrode operational state of charge
  opsocneg0 = 1  // Negative electrode operational state of charge
  Rsol = 6.0e-3[ohm*m^2]  // Solution phase resistance in the cell
  cl = 2000[mol/m^3]  // Electrolyte salt concentration
  epsspos = 0.297  // Solid phase volume fraction in positive electrode
  epssneg = 0.471  // Solid phase volume fraction in negative electrode
  rppos = 8e-6[m]  // Particle radius positive electrode
  rpneg = 12.5e-6[m]  // Particle radius negative electrode
  socmaxpos = 0.76  // Maximum positive electrode state of charge
  socmaxneg = 0.5635  // Maximum negative electrode state of charge
  socminpos = 0.1706  // Minimum positive electrode state of charge
  Dsneg = 3.9e-14[m^2/s]  // Solid phase Li-diffusivity negative electrode
  Dspos = 1e-13[m^2/s]  // Solid phase Li-diffusivity positive electrode
  csmaxneg = 26390[mol/m^3]  // Max solid phase concentration negative electrode
  kneg = 8.7106E-10[m/s]  // Rate constant negative electrode
  kpos = 9.6422E-10[m/s]  // Rate constant positive electrode
  clref = 2000[mol/m^3]  // Reference electrolyte salt concentration
  T = 298[K]  // Temperature
  Vmin = 3.45[V]  // Minimum voltage for charge discharge cycling study
  Vmax = 4.418[V]  // Maximum voltage for charge discharge cycling study
  trestdch = 300[s]  // Resting time discharge for charge discharge cycling study
  trestch = 3700[s]  // Resting time charge for charge discharge cycling study

Functions
  int1: Interpolation
    funcname = Eeq_neg
    table = 
      {0.0500, 0.9761}
      {0.1000, 0.8179}
      {0.1500, 0.6817}
      {0.2000, 0.5644}
      {0.2500, 0.4635}
      {0.3000, 0.3767}
      {0.3500, 0.3019}
      {0.4000, 0.2376}
      {0.4500, 0.1822}
      {0.5000, 0.1345}
      {0.5500, 0.0935}
      {0.600, 0.0582}
      {0.6500, 0.0278}
      {0.7000, 0.0016}
    interp = cubicspline
    extrap = interior
    fununit = V

Variables
  var1 "Variables 1"
    Eeqneg = Eeq_neg(spb.soc_surface_neg1)

Materials
  mat1: Common "LMO, LiMn2O4 Spinel (Positive, Li-ion Battery)"
    def "Basic"
      youngsmodulus = 194[GPa]
      poissonsratio = 0.26
      electricconductivity = 3.8[S/m]
      diffusion = 1e-14*exp(20000/8.314*(1/(T_ref/1[K])-1/(T2/1[K])))[m^2/s]
      density = 4140[kg/m^3]
      T_ref = 298[K]
      T2 = min(393.15,max(T,223.15))
    ElectrodePotential "Equilibrium potential"
      Eeq = Eeq_int1(soc)+dEeqdT_int1(soc)*(T-298[K])
      dEeqdT = dEeqdT_int1(soc)
      cEeqref = 22860[mol/m^3]
      soc = c/cEeqref
      int1: Interpolation
        funcname = Eeq_int1
        table = 
          {0.1750, 4.2763}
          {0.1950, 4.1898}
          {0.2150, 4.1507}
          {0.2350, 4.133}
          {0.2550, 4.1248}
          {0.2750, 4.1209}
          {0.2950, 4.119}
          {0.3150, 4.1179}
          {0.3350, 4.1171}
          {0.3550, 4.1165}
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        interp = piecewisecubic
        extrap = linear
        fununit = V
      int2: Interpolation
        funcname = dEeqdT_int1
        table = 
          {0.15, 0.15e-3}
          {0.18, 0.25e-3}
          {0.20, 0.21e-3}
          {0.209, 0.19e-3}
          {0.26, 0.175e-3}
          {0.28, 0.166e-3}
          {0.30, 0.155e-3}
          {0.35, 0.11e-3}
          {0.394, 0.095e-3}
          {0.41, 0.05e-3}
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        interp = piecewisecubic
        fununit = V/K
    OperationalSOC "Operational electrode state-of-charge"
      socmax = 0.995
      socmin = 0.175

Physics
  spb: SingleParticleBattery
    BatterySettings.eps_pos = epspos
    BatterySettings.eps_neg = epsneg
    BatterySettings.OperationMode = ChargeDischargeCycling
    BatterySettings.I_app = Iapplied
    BatterySettings.Ich = -Iapplied
    BatterySettings.Idch = Iapplied
    BatterySettings.item.OCDCH = 1
    BatterySettings.Vmax = Vmax
    BatterySettings.item.OCCH = 1
    BatterySettings.Vmin = Vmin
    BatterySettings.trech = trestch
    BatterySettings.tredch = trestdch
    InitialChargeDistribution.InitialState = ElectrodeSOCs
    InitialChargeDistribution.opsoc_pos0 = opsocpos0
    InitialChargeDistribution.opsoc_neg0 = opsocneg0
    Vcell.V_cell = Vcell
    elecsep1: ElectrolyteAndSeparator
      cl = cl
      SolutionResistance = UserDefined
      R_sol = Rsol
      L_sep = Lsep
      eps_sep = epssep
    pos1: PositiveElectrode
      epss = epsspos
      Ds_mat = userdef
      Ds = Dspos
      ParticleMaterial = mat1
      socmin_mat = userdef
      socmin = socminpos
      socmax_mat = userdef
      socmax = socmaxpos
      rp = rppos
      minput_temperature = T
      per1: PorousElectrodeReaction
        MaterialOption = mat1
        i0refType = FromRateConstant
        k = kpos
        cl_ref = clref
        minput_temperature = T
    neg1: NegativeElectrode
      epss = epssneg
      Ds_mat = userdef
      Ds = Dsneg
      cEeqref_mat = userdef
      cEeqref = csmaxneg
      socmin_mat = userdef
      socmin = 0
      socmax_mat = userdef
      socmax = socmaxneg
      rp = rpneg
      per1: PorousElectrodeReaction
        Eeq_mat = userdef
        Eeq = Eeqneg
        i0refType = FromRateConstant
        k = kneg
        cl_ref = clref
        dEeqdT_mat = userdef
        dEeqdT = 0
        minput_temperature = T

Studies
  std1 "Study 1"
    cdi: CurrentDistributionInitialization
    time: Transient "Time Dependent"
      tlist = {0, 40000}
      initialtime = 0
      usertol = on
      rtol = 0.001
      useparam = on
      pname = a
      plistarr = 0.1 1 2
  std2 "Study 2"
    cdi: CurrentDistributionInitialization
    time: Transient "Time Dependent" | tlist = range(0,10,8000); initialtime = 0

Solver configurations
  sol1 "Solution 1" (study std1)
    v1: Variables "Dependent Variables 1"
      comp1_spb_neg1_cs: Field "Concentration (comp1.spb.neg1.cs)" | scalemethod = manual; scaleval = 10000
      comp1_spb_pos1_cs: Field "Concentration (comp1.spb.pos1.cs)" | scalemethod = manual; scaleval = 10000
      comp1_spb_pos1_Ect: State "Electrode potential (comp1.spb.pos1.Ect)" | scalemethod = manual; scaleval = 1
      comp1_spb_neg1_Ect: State "Electrode potential (comp1.spb.neg1.Ect)" | scalemethod = manual; scaleval = 1
    s1: Stationary "Stationary Solver 1"
      fc1: FullyCoupled | linsolver = d1; minstep = 1.0E-6
      d1: Direct
    su1: StoreSolution "Solution Store 1"
    v2: Variables "Dependent Variables 2" | initmethod = sol; notsolmethod = sol
      comp1_spb_neg1_cs: Field "Concentration (comp1.spb.neg1.cs)" | scalemethod = manual; scaleval = 10000
      comp1_spb_pos1_cs: Field "Concentration (comp1.spb.pos1.cs)" | scalemethod = manual; scaleval = 10000
      comp1_spb_pos1_Ect: State "Electrode potential (comp1.spb.pos1.Ect)" | scalemethod = manual; scaleval = 1
      comp1_spb_neg1_Ect: State "Electrode potential (comp1.spb.neg1.Ect)" | scalemethod = manual; scaleval = 1
    t1: Time "Time-Dependent Solver 1" | tlist = {0, 40000}; tout = tsteps
      tp1: TimeParametric
      fc1: FullyCoupled | linsolver = d1; dtech = auto; maxiter = 5
      d1: Direct
      st1: StopCondition
        stopcondterminateon = true
        stopconddesc = Stop expression 1
        stopcondarr = comp1.spb.E_cell<2.0
  sol2 "Solution Store 1" (study std1)
  sol3 "Solution 3" (study std2)
    v1: Variables "Dependent Variables 1"
      comp1_spb_neg1_cs: Field "Concentration (comp1.spb.neg1.cs)" | scalemethod = manual; scaleval = 10000
      comp1_spb_pos1_cs: Field "Concentration (comp1.spb.pos1.cs)" | scalemethod = manual; scaleval = 10000
      comp1_spb_pos1_Ect: State "Electrode potential (comp1.spb.pos1.Ect)" | scalemethod = manual; scaleval = 1
      comp1_spb_neg1_Ect: State "Electrode potential (comp1.spb.neg1.Ect)" | scalemethod = manual; scaleval = 1
    s1: Stationary "Stationary Solver 1"
      fc1: FullyCoupled | linsolver = d1; minstep = 1.0E-6
      d1: Direct
    su1: StoreSolution "Solution Store 2"
    v2: Variables "Dependent Variables 2" | initmethod = sol; notsolmethod = sol
      comp1_spb_neg1_cs: Field "Concentration (comp1.spb.neg1.cs)" | scalemethod = manual; scaleval = 10000
      comp1_spb_pos1_cs: Field "Concentration (comp1.spb.pos1.cs)" | scalemethod = manual; scaleval = 10000
      comp1_spb_pos1_Ect: State "Electrode potential (comp1.spb.pos1.Ect)" | scalemethod = manual; scaleval = 1
      comp1_spb_neg1_Ect: State "Electrode potential (comp1.spb.neg1.Ect)" | scalemethod = manual; scaleval = 1
    t1: Time "Time-Dependent Solver 1" | tlist = range(0,10,8000)
      fc1: FullyCoupled | linsolver = d1; dtech = auto; maxiter = 5
      d1: Direct
  sol4 "Solution Store 2" (study std2)

Datasets
  dset1: Solution | solution = sol1
  dset2: Solution | solution = sol2
  dset3: Solution | solution = sol3
  dset4: Solution | solution = sol4

Tables
  tbl1: Table
    X | Height
    0 | 4.20458
    0.000879555 | 4.20322
    0.00439777 | 4.20114
    0.0184707 | 4.19644
    0.0536529 | 4.188
    0.13809 | 4.17025
    0.363256 | 4.12763
    0.701005 | 4.07753
    1.3765 | 4.01782
    2.7275 | 3.95523
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  tbl2: Table
    X | Height
    0 | 4.09878
    0.00104853 | 4.09541
    0.00629117 | 4.08689
    0.0146794 | 4.07919
    0.0356499 | 4.06614
    0.0859793 | 4.04501
    0.169862 | 4.01969
    0.371179 | 3.97585
    0.639602 | 3.93563
    1.04224 | 3.89288
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  tbl3: Table
    X | Height
    0 | 4.00398
    0.000966149 | 3.99979
    0.00579689 | 3.9879
    0.0154584 | 3.97431
    0.0309168 | 3.96
    0.0695627 | 3.9356
    0.131396 | 3.9087
    0.279797 | 3.86528
    0.502397 | 3.82268
    0.836298 | 3.77856
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  tbl4: Table
    X | Height
    0 | 4.10059
    10 | 4.06039
    20 | 4.04131
    30 | 4.02642
    40 | 4.01347
    50 | 4.00191
    60 | 3.99129
    70 | 3.9816
    80 | 3.97264
    90 | 3.96445
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
Plots
  pg1: PlotGroup1D "Cell Potential (spb)"
    data = dset1
    title = DIschage profiles
    xlabel = Capacity (Ah/m<sup>2</sup>)
    ylabel = Cell potential (V)
    glob1: Global | expr = spb.E_cell; xdata = expr; xdataexpr = (t[s]/1[h])*i_1C*a
    tblp1: Table "Table Graph 1" | table = tbl1; legends = 1D model, 0.1 C
    tblp2: Table "Table Graph 2" | table = tbl2; legends = 1D model, 1 C
    tblp3: Table "Table Graph 3" | table = tbl2; legends = 1D model, 2 C
  pg2: PlotGroup1D "Cell Current (spb)" | data = dset1
    glob1: Global | expr = spb.I_cell
  pg3: PlotGroup1D "Positive Electrode Operational State-of-Charge, Particle Surface (spb)" | data = dset1
    glob1: Global | expr = spb.opsoc_pos_surface
  pg4: PlotGroup1D "Negative Electrode Operational State-of-Charge, Particle Surface (spb)" | data = dset1
    glob1: Global | expr = spb.opsoc_neg_surface
  pg5: PlotGroup1D "Total Power Dissipation Density (spb)" | data = dset1
    glob1: Global | expr = spb.Qh
  pg6: PlotGroup1D "Charge Discharge Cycling Potential" | data = dset3; xlabel = Time (s); ylabel = Cell Potential (V)
    glob1: Global | expr = spb.E_cell; unit = V; descr = Cell potential; xdataexpr = t; legends = Single particle model
    tblp1: Table "Table Graph 1" | table = tbl4; legends = 1D model