// COMSOL Multiphysics 6.0.0.354 model "lumped_li_battery_parameter_estimation.mph"
// Outline of the model tree

Parameters
  eta_IR_1C = 10[mV]  // Ohmic overpotential at 1C, fitting parameter
  invJ0 = 1  // Inverse dimensionless charge exchange current, fitting parameter
  tau = 1000[s]  // Diffusion time constant, fitting parameter
  J0 = 1/invJ0  // Dimensionless charge exchange current
  Q_cell0 = 12[A*h]  // Battery capacity
  SOC_0 = 0.3797  // Initial state-of-charge
  T = 298.15[K]  // Temperature

Functions
  int1: Interpolation "Interpolation - E and I vs. t" | funcs = {{E_cell_exp, 1}, {I_cell_exp, 2}}; source = resultTable; resultTableFile = /tmp/cscomsol48203/resulttabledata8491658239545626901.csv; argunit = s
  int2: Interpolation "Interpolation - E and I vs. t (full)" | funcs = {{E_cell_exp_full, 1}, {I_cell_exp_full, 2}}; source = resultTable; resultTableFile = /tmp/cscomsol48203/tmp6346854764547032377.csv; argunit = s

Variables
  var1 "Variables 1"
    I_cell_exp = I_cell_exp(t)[A]  // Experimental cell current
    E_cell_exp = E_cell_exp(t)[V]  // Experimental cell voltage
  var2 "Variables 2"
    I_cell_exp = I_cell_exp_full(t)[A]  // Experimental cell current - full load cycle
    E_cell_exp = E_cell_exp_full(t)[V]  // Experimental cell voltage - full load cycle

Probes
  var1: GlobalVariable "Global Variable Probe 1"
    expr = eta_IR_1C
    unit = V
    descr = Ohmic overpotential at 1C, fitting parameter
    table = tbl2
  var2: GlobalVariable "Global Variable Probe 2"
    expr = invJ0
    descr = Inverse dimensionless charge exchange current, fitting parameter
    table = tbl2
  var3: GlobalVariable "Global Variable Probe 3"
    expr = tau
    unit = s
    descr = Diffusion time constant, fitting parameter
    table = tbl2

Physics
  lb: LumpedBattery
    BatterySettings.Q_cell0 = Q_cell0
    BatterySettings.SOC_cell0 = SOC_0
    BatterySettings.I_app = I_cell_exp
    cep1: CellEquilibriumPotential
      Eocv = {1.31041908379, 2.26110690489, 2.83342133003, 3.18443624237, 3.39301629587, 3.51087514541, 3.58694635843, 3.6264514929, 3.655756542, 3.6850615911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}
      SOC_Eocv = {0, 0.01, 0.02, 0.03, 0.04, 0.05, 0.06, 0.07, 0.08, 0.09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}
      Tref = T
    vl1: VoltageLosses
      eta_ir1C = eta_IR_1C
      J0 = J0
      IncludeConcentrationOverpotential = 1
      tau = tau
      minput_temperature = T

Studies
  std1 "Study 1 - Load Curve Simulation"
    time: Transient "Time Dependent" | tlist = range(0,1,300); usertol = on; rtol = 0.001; disabledvariables = {var2}
  std2 "Study 2 - Parameter Estimation"
    lsqo: LSQOptimization "Parameter Estimation"
      source = resultTable
      columnType = {col1, time, col2, value, col3, none}
      modelExpression = {col1, 1, col2, comp1.lb.E_cell, col3, 1}
      unit = {col1, , col2, V, col3, }
      initval = {10[mV], 1, 1000[s]}
      scale = {0.01, 1, 1000}
      lbound = {, , }
      ubound = {, , }
      pname = {eta_IR_1C, invJ0, tau}
      optsolver = lm
      lsqdatamethod = lsq
    time: Transient "Time Dependent" | tlist = range(0,0.1,1); disabledvariables = {var2}
  std3 "Study 3 - Full Load Curve Predicition"
    time: Transient "Time Dependent"
      tlist = range(0,1,600)
      usertol = on
      rtol = 0.001
      disabledvariables = {var1}
      useinitsol = on
      initmethod = sol
      initstudy = std2

Solver configurations
  sol1 "Solution 1" (study std1)
    v1: Variables "Dependent Variables 1"
      comp1_lb_vl1_SOC: Field "State-of-charge (comp1.lb.vl1.SOC)" | scalemethod = manual; scaleval = 1
    t1: Time "Time-Dependent Solver 1" | tlist = range(0,1,300)
      dDef: Direct
      fc1: FullyCoupled | linsolver = dDef
  sol2 "Solution 2" (study std2)
    v1: Variables "Dependent Variables 1"
      comp1_lb_vl1_SOC: Field "State-of-charge (comp1.lb.vl1.SOC)" | scalemethod = manual; scaleval = 1
    o1: Optimization "Optimization Solver 1"
      t1: TimeAttrib "Time-Dependent Solver 1"
        tlistlsq = {1, 2, 3, 4, 5, 6, 7, 8, 9, 10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}
        lsqtimesout = 1.00 2.00 3.00 4.00 5.00 6.00 7.00 8.00 9.00 10.0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
        dDef: Direct
        fc1: FullyCoupled | linsolver = dDef
  sol3 "Solution 3" (study std3)
    v1: Variables "Dependent Variables 1"
      comp1_lb_vl1_SOC: Field "State-of-charge (comp1.lb.vl1.SOC)" | scalemethod = manual; scaleval = 1
    t1: Time "Time-Dependent Solver 1" | tlist = range(0,1,600)
      dDef: Direct
      fc1: FullyCoupled | linsolver = dDef

Datasets
  dset1: Solution | solution = sol1
  dset2: Solution | solution = sol2
  dset3: Solution "Probe Solution 3" | solution = sol3
  dset4: Solution | solution = sol3

Derived values
  gev1: EvalGlobal "Global Variable Probe 1" | data = dset3; table = tbl2; expr = eta_IR_1C
  gev2: EvalGlobal "Global Variable Probe 2" | data = dset3; table = tbl2; expr = invJ0
  gev3: EvalGlobal "Global Variable Probe 3" | data = dset3; table = tbl2; expr = tau
  gev4: EvalGlobal "Global Evaluation: Standard Deviation (Study 1)"
    data = dset1
    table = tbl5
    expr = lb.E_cell-E_cell_exp
    dataseries = stddev
  gev5: EvalGlobal "Global Evaluation: Standard Deviation (Study 2)"
    data = dset2
    table = tbl5
    expr = lb.E_cell-E_cell_exp
    dataseries = stddev
  gev6: EvalGlobal "Global Evaluation: Standard Deviation (Study 3)"
    data = dset4
    table = tbl5
    expr = lb.E_cell-E_cell_exp
    dataseries = stddev

Tables
  tbl1: Table "Load Cycle Data"
    Time (s) | Voltage (V) | Current (A)
    1 | 3.63532 | -240
    2 | 3.61107 | -240
    3 | 3.59193 | -240
    4 | 3.57806 | -240
    5 | 3.5796 | -216
    6 | 3.61453 | -144
    7 | 3.62182 | -120
    8 | 3.60987 | -144
    9 | 3.63954 | -96
    10 | 3.6326 | -96
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  tbl2: Table "Probe Table 2"
    Time (s) | Ohmic overpotential at 1C, fitting parameter (V) | Inverse dimensionless charge exchange current, fitting parameter | Diffusion time constant, fitting parameter (s)
    0 | 0.01 | 1 | 1000
    0.00355824 | 0.01 | 1 | 1000
    0.00711649 | 0.01 | 1 | 1000
    0.014233 | 0.01 | 1 | 1000
    0.0284659 | 0.01 | 1 | 1000
    0.0569319 | 0.01 | 1 | 1000
    0.0853978 | 0.01 | 1 | 1000
    0.14233 | 0.01 | 1 | 1000
    0.199262 | 0.01 | 1 | 1000
    0.256193 | 0.01 | 1 | 1000
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  tbl3: Table "Objective Probe Table 3"
    eta_IR_1C (V) | invJ0 | tau (s) | Objective
    0.00446632 | 1.15358 | 1372.59 | 0.0422281
    0.00451621 | 1.15646 | 1374.42 | 0.042195
    0.00452445 | 1.1571 | 1374.92 | 0.0421935
    0.00452459 | 1.15711 | 1374.93 | 0.0421935
  tbl4: Table "Full Load Cycle Data"
    Time (s) | Voltage (V) | Current (A)
    1 | 3.63532 | -240
    2 | 3.61107 | -240
    3 | 3.59193 | -240
    4 | 3.57806 | -240
    5 | 3.5796 | -216
    6 | 3.61453 | -144
    7 | 3.62182 | -120
    8 | 3.60987 | -144
    9 | 3.63954 | -96
    10 | 3.6326 | -96
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  tbl5: Table
    // Global Evaluation: Standard Deviation (Study 1)
    Standard deviation: lb.E_cell-E_cell_exp (V) | Standard deviation: lb.E_cell-E_cell_exp (V) | Standard deviation: lb.E_cell-E_cell_exp (V)
    0.0303204 | 0.0146174 | 0.0457235

Plots
  pg1: PlotGroup1D "Cell Voltage" | data = dset2; ylabel = Cell potential (V)
    glob1: Global | expr = lb.E_cell; descr = Modeled cell voltage
    glob2: Global | expr = lb.Eocv_cell
    glob3: Global | expr = E_cell_exp; unit = V; descr = Experimental cell voltage
  pg2: PlotGroup1D "Cell State-of-Charge (lb)" | data = dset1
    glob1: Global | expr = lb.SOC_cell
    glob2: Global | expr = lb.I_cell
  pg3: PlotGroup1D "Voltage Losses and Load" | data = dset2; ylabel = Overvoltage (V)
    glob1: Global
      expr = {lb.eta_ir, lb.eta_act, lb.eta_conc}
      unit = {V, V, V}
      descr = {Ohmic overpotential, Activation overpotential, Concentration overpotential}
      xdata = expr
      xdataexpr = t
    glob2: Global | expr = lb.I_cell; unit = A; descr = Cell current; xdata = expr; xdataexpr = t
  pg4: PlotGroup1D "Probe Plot Group 4"
    tblp1: Table "Probe Table Graph 1" | table = tbl2
  pg5: PlotGroup1D "Cell Voltage: Full Cycle Prediction" | data = dset4; ylabel = Cell potential (V)
    glob1: Global | expr = lb.E_cell; descr = Predicted cell voltage
    glob2: Global | expr = lb.Eocv_cell
    glob3: Global | expr = E_cell_exp; unit = V; descr = Experimental cell voltage