// COMSOL Multiphysics 6.0.0.354 model "pcm-basic.mph"
// Outline of the model tree

Parameters
  kr = 0.413[W/m/K]  // Radial thermal conductivity
  ka = 1.78[W/m/K]  // Axial thermal conductivity
  cp = 958.5[J/kg/K]  // Specific Heat
  cell_half_h = 0.0325[m]  // Cell half height
  cell_r = 0.009[m]  // Cell radius
  cell_vol = (2*cell_half_h)*pi*cell_r^2  // Cell Volume
  HTC = 21.3[W/m^2/K]  // Heat transfer coefficient
  T0 = 23.9[degC]  // Initial Ambient temperature
  rho = 2900[kg/m^3]  // Battery density
  cell_num = 4  // Number of cells
  space_factor = 3  // Spacing factor - multiplied by cell radius
  pcm_width_factor = 1

Coordinate systems
  sys2: Cylindrical "bat1"
  sys3: Cylindrical "bat2" | origin = {space_factor*cell_r, 0, 0}
  sys4: Cylindrical "bat3" | origin = {2*space_factor*cell_r, 0, 0}
  sys5: Cylindrical "bat4" | origin = {3*space_factor*cell_r, 0, 0}

Geometry
  geom1 "Geometry 1" (3D, length unit m)
    cyl1: Cylinder | contributeto = csel1; r = cell_r; h = cell_half_h*2
    arr1: Array
      contributeto = csel1
      input = cyl1
      size = cell_num
      type = linear
      linearsize = cell_num
      displ = {space_factor*cell_r, 0, 0}
    blk1: Block
      pos = {-cell_r - pcm_width_factor*cell_r, -cell_r - pcm_width_factor*cell_r, 0}
      size = {2*cell_num*cell_r + (space_factor*cell_r*(cell_num-1) - 2*cell_r*(cell_num-1))+ 2*pcm_width_factor*cell_r, 2*cell_r + pcm_width_factor*2*cell_r, cell_half_h*2}
    dif1: Difference | contributeto = csel2; input = blk1; input2 = selection csel1; keepsubtract = on
    fin: Finalize "Form Union"

Physics
  ht: HeatTransferInSolidsAndFluids on all domains
    dependent variable T
    solid1: SolidHeatTransferModel "Solid 1" (default)
    fluid1: FluidHeatTransferModel "Fluid 1" on selection geom1_csel2_dom
    init1: init "Initial Values 1" (default)
    ins1: ThermalInsulation (default)
    hf1: HeatFluxBoundary "Heat Flux 1" on boundaries 1, 2, 4, 5, 9, 15, 21, 27, 30
      HeatFluxType = ConvectiveHeatFlux
      HeatTransferCoefficientType = ExtNaturalConvection
      Lwall = 2*root.cell_half_h
  lb: LumpedBattery on all domains
    cep1: CellEquilibriumPotential (default)
    vl1: VoltageLosses (default)

Mesh
  mesh1 "Mesh 1" (physics-controlled)

Studies
  std1 "Study 1"
    stat: Stationary