// COMSOL Multiphysics 6.0.0.354 model "pcm-basic_coupled.mph"
// Outline of the model tree

Parameters
  cell_half_h = 0.0325[m]  // Cell half height
  cell_r = 0.009[m]  // Cell radius
  cell_vol = (2*cell_half_h)*pi*cell_r^2  // Cell Volume
  cell_num = 4  // Number of cells
  space_factor = 3  // Spacing factor - multiplied by cell radius
  pcm_width_factor = 1
  pcm_kxy = 20[W/m/K]  // PCM thermal conductivity in the XY plane
  pcm_kz = 8[W/m/K]  // PCM thermal conductivity in the Z direction
  pcm_solid_cp = 1910[J/kg/K]  // PCM solid specific heat capacity
  pcm_liquid_cp = 2250[J/kg/K]  // PCM liquid specific heat capacity
  pcm_deltaT = 6[K]  // PCM temperature melting range
  pcm_melt_lower = 32[degC]  // PCM lower bound of melting range
  pcm_melt_upper = pcm_melt_lower+pcm_deltaT  // PCM upper bound of metling range
  pcm_LH = 155[kJ/kg]  // PCM latent heat
  batt_cp = 958.5[J/kg/K]  // Battery specific heat
  batt_ka = 1.78[W/m/K]  // Battery axial thermal conductivity
  batt_kr = 0.413[W/m/K]  // Battery radial thermal conductivity
  batt_rho = 2901.97[kg/m^3]  // NCA battery density
  T0 = 23.9[degC]  // Initial ambient temperature
  pcm_rho = 895[kg/m^3]  // PCM density
  pcm_melt_point = 37[degC]  // PCM melt point
  pcm_alpha_solid = 0.1[1/K]  // PCM thermal expansion in solid phase
  pcm_alpha_melt = 0.841[1/K]  // PCM thermal expansion during melting
  pcm_alpha_liquid = 0.075  // PCM thermal expansion in liquid phase

Coordinate systems
  sys2: Cylindrical "bat1"
  sys3: Cylindrical "bat2" | origin = {space_factor*cell_r, 0, 0}
  sys4: Cylindrical "bat3" | origin = {2*space_factor*cell_r, 0, 0}
  sys5: Cylindrical "bat4" | origin = {3*space_factor*cell_r, 0, 0}

Geometry
  geom1 "Geometry 1" (3D, length unit m)
    cyl1: Cylinder | contributeto = csel1; r = cell_r; h = cell_half_h*2
    arr1: Array
      contributeto = csel1
      input = cyl1
      size = cell_num
      type = linear
      linearsize = cell_num
      displ = {space_factor*cell_r, 0, 0}
    blk1: Block
      pos = {-cell_r - pcm_width_factor*cell_r, -cell_r - pcm_width_factor*cell_r, 0}
      size = {2*cell_num*cell_r + (space_factor*cell_r*(cell_num-1) - 2*cell_r*(cell_num-1))+ 2*pcm_width_factor*cell_r, 2*cell_r + pcm_width_factor*2*cell_r, cell_half_h*2}
    dif1: Difference | contributeto = csel2; input = blk1; input2 = selection csel1; keepsubtract = on
    fin: Finalize "Form Union"
    sel1: ExplicitSelection "Battery 1" | selection = fin(1) domains 2
    sel2: ExplicitSelection "Battery 2" | selection = fin(1) domains 3
    sel3: ExplicitSelection "Battery 3" | selection = fin(1) domains 4
    sel4: ExplicitSelection "Battery 4" | selection = fin(1) domains 5

Materials
  mat1: Common "PCM - Liquid" on selection geom1_csel2_dom
    def "Basic"
      heatcapacity = root.pcm_liquid_cp
      density = root.pcm_rho
      thermalconductivity = 1
  mat2: Common "PCM - Solid" on selection geom1_csel2_dom
    def "Basic"
      density = root.pcm_rho
      heatcapacity = root.pcm_solid_cp
  mat3: Common "batteries" on selection geom1_csel1_dom
    def "Basic"
      thermalconductivity = 1
      density = root.batt_rho
      heatcapacity = root.batt_cp

Physics
  ht: HeatTransferInSolidsAndFluids on all domains
    dependent variable T
    solid1: SolidHeatTransferModel "Battery: 1" (default)
      k_mat = userdef
      k = diag{root.batt_kr, root.batt_kr, root.batt_ka}
      coordinateSystem = sys2
    fluid1: FluidHeatTransferModel "Fluid 1" on selection geom1_csel2_dom
      phc1: PhaseChangeMaterial on all domains
        T_pc12 = root.pcm_melt_point
        dT_pc12 = root.pcm_deltaT
        L_pc12 = root.pcm_LH
        MaterialPhase1 = mat2
        MaterialPhase2 = mat1
        k_phase1_mat = userdef
        k_phase1 = diag{root.pcm_kxy, root.pcm_kxy, root.pcm_kz}
        k_phase2_mat = userdef
        k_phase2 = diag{root.pcm_kxy, root.pcm_kxy, root.pcm_kz}
        Cp_phase1_mat = from_mat
    init1: init "Initial Values 1" (default) | Tinit = T0
    ins1: ThermalInsulation (default)
    solid2: SolidHeatTransferModel "Battery: 2" on selection geom1_sel2
      k_mat = userdef
      k = diag{root.batt_kr, root.batt_kr, root.batt_ka}
      coordinateSystem = sys3
    solid3: SolidHeatTransferModel "Battery: 3" on selection geom1_sel3
      k_mat = userdef
      k = diag{root.batt_kr, root.batt_kr, root.batt_ka}
      coordinateSystem = sys4
    solid4: SolidHeatTransferModel "Battery: 4" on selection geom1_sel4
      k_mat = userdef
      k = diag{root.batt_kr, root.batt_kr, root.batt_ka}
      coordinateSystem = sys5
    hf1: HeatFluxBoundary "Heat Flux 1" on boundaries 1, 2, 4, 5, 9, 15, 21, 27, 30
      HeatFluxType = ConvectiveHeatFlux
      HeatTransferCoefficientType = ExtNaturalConvection
      Lwall = 2*root.cell_half_h
  lb1: LumpedBattery on selection geom1_sel1
    cep1: CellEquilibriumPotential (default)
    vl1: VoltageLosses (default)
  lb2: LumpedBattery on selection geom1_sel2
    cep1: CellEquilibriumPotential (default)
      OpenCircuitVoltageInput = localtable
      SOC_Eocv = {0, 1}
      SOC_dEocvdT = {0, 1}
      Tref = 293.15[K]
    vl1: VoltageLosses (default)
      eta_ir1C = 10[mV]
      IncludeActivationOverpotential = 1
      J0 = 1
      Cdl_1C = 1[F/A]
      ConcentrationOverpotentialType = ParticleDiffusion
      tau = 1000[s]
      ParticleType = Spheres
      tau_RC = 100[s]
      E_RC1C = 1[mV]
      Distribution = CubicRoot
      Ed = 0,0.5,1
      Nel = 10
      Nord = 1
      eta_conc0 = 0[V]
  lb3: LumpedBattery on selection geom1_sel3
    cep1: CellEquilibriumPotential (default)
      OpenCircuitVoltageInput = localtable
      SOC_Eocv = {0, 1}
      SOC_dEocvdT = {0, 1}
      Tref = 293.15[K]
    vl1: VoltageLosses (default)
      eta_ir1C = 10[mV]
      IncludeActivationOverpotential = 1
      J0 = 1
      Cdl_1C = 1[F/A]
      ConcentrationOverpotentialType = ParticleDiffusion
      tau = 1000[s]
      ParticleType = Spheres
      tau_RC = 100[s]
      E_RC1C = 1[mV]
      Distribution = CubicRoot
      Ed = 0,0.5,1
      Nel = 10
      Nord = 1
      eta_conc0 = 0[V]
  lb4: LumpedBattery on selection geom1_sel4
    cep1: CellEquilibriumPotential (default)
      OpenCircuitVoltageInput = localtable
      SOC_Eocv = {0, 1}
      SOC_dEocvdT = {0, 1}
      Tref = 293.15[K]
    vl1: VoltageLosses (default)
      eta_ir1C = 10[mV]
      IncludeActivationOverpotential = 1
      J0 = 1
      Cdl_1C = 1[F/A]
      ConcentrationOverpotentialType = ParticleDiffusion
      tau = 1000[s]
      ParticleType = Spheres
      tau_RC = 100[s]
      E_RC1C = 1[mV]
      Distribution = CubicRoot
      Ed = 0,0.5,1
      Nel = 10
      Nord = 1
      eta_conc0 = 0[V]
  spf: LaminarFlow on selection geom1_csel2_dom
    dependent variable u = {u, v, w}
    PhysicalModelProperty.IncludeGravity = 1
    PhysicalModelProperty.UseReducedPressure = 1
    fp1: FluidProperties (default)
    init1: init "Initial Values 1" (default)
    wallbc1: WallBC "Wall 1" (default)
    grav1: Gravity
    prpc1: PressurePointConstraint on points 2

Multiphysics
  ech1: ElectrochemicalHeating "Electrochemical Heating: Battery 1" on all domains
    ECHeat_physics = lb1
    Heat_physics = ht
  ech2: ElectrochemicalHeating "Electrochemical Heating: Battery 2" on all domains
    ECHeat_physics = lb2
    Heat_physics = ht
  ech3: ElectrochemicalHeating "Electrochemical Heating: Battery 3" on all domains
    ECHeat_physics = lb3
    Heat_physics = ht
  ech4: ElectrochemicalHeating "Electrochemical Heating: Battery 4" on all domains
    ECHeat_physics = lb4
    Heat_physics = ht
  nitf1: NonIsothermalFlow on all domains
    SpecifyDensity = CustomLinearizedDensity
    BoussinesqApproximation = 1
    rhoref_mat = from_mat
    alphap = root.pcm_alpha_liquid
    Fluid_physics = spf
    Heat_physics = ht

Mesh
  mesh1 "Mesh 1" (physics-controlled)

Studies
  std1 "Study 1"
    stat: Stationary